# Расчет циклограммы движения привода и тормозного резистора
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# Электромеханизм DA14.525576.001
# Проект id4633
# Автор : Тихонов Е.Н.
# Привод NGV
# Исходные данные:
Mn := 21  # Nm  # Номинальный момент двигателя
n := 2500  # об/мин  # Номинальная скорость двигателя (из pdf)
Wn := n*π/30 = 261.799  # rad/sek  # Номинальная скорость двигателя (из n)
Fшток := 30000  # N  # усилие на штоке (из ТЗ)
ηgear1 := 0.6  # прямой КПД РВП электромеханизма
ηgear2 := 0.38  # обратное КПД РВП электромеханизма
ηдвиг := 0.88  # обратное КПД электродвигателя
Kрвп := 2.5  # мм/об  # коэфф передачи РВП, мм/об (из КД на РВП ЭМП)
tраз_тор := 0.5  # Сек  # Время разгона и торможения
Wмакс := 27.2*60*π/30 = 170.903  # рад/с  # Максимальная скорость перемещения
Kt_mot := 2.2  # Нм/А  # Постоянная момента двигателя
Rphase := 0.88/2 = 0.44  # Ом  # Сопротивлеине фазы мотора
# Приведенные моменты инерции к валу двигателя
Jрвп := 0.007335  # кг*м^2  # момент инерции РВП (от Анспука, уточненный)
Jдвиг := 0.0  # кг*м^2  # момент инерции двигателя (из PDF на мотор, не учитываю, т.к. он включен в Jрвп)
# суммарный момент инерции на валу
Jсумм := Jрвп + Jдвиг = 0.007335  # кг*м^2
# Момент инерции нагрузки неизвестен. Принимаем его равным нулю
Jнагр := 0
Uac := 440  # В  # макс. переменное напряжение питания БУП  (rms) (из ТЗ)
Udc := Uac*sqrt(2) = 622.254  # выпрямленное напряжение в ЗПТ
# Выбираем ограничение по максимальному напряжению в ЗПТ. Самое слабое место - конденсаторы. Их номинал и будет являться ограничением.
U := 800  # V  # максимально допустимое напряжение ЗПТ
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T_move := 3.0  # с  # Время перекладки на рабочий ход (из ТЗ)
S_rab := 170  # mm  # Рабочий ход (из ТЗ)
Cзпт := 1800*10^-6*1.1  # F  # Емкость звена пост. тока + 10% (из pdf)
# РАСЧЕТЫ
# 1. Расчет циклограмм
# Здесть мы определяем время разгона и торможения в различных режимах
# 1.1 Генераторный режим (работа по нагрузке, т.е. нагрузка работает на нас, вытягивая или вдавливая шток)
# 1.1.1 Разгон
Mстат1 := Fшток*Kрвп*10^-3/(2*π)*ηgear2 = 4.53592  # Nm  # стат. момент на валу двигателя
# 2й закон Ньютона:  М-Мс = J dw/dt
ε1 := |Mn + Mстат1|/Jсумм = 3481.38  # рад/(сек*сек)  # максимальное угловое ускорение  разгона привода
a1 := ε1*Kрвп*0.159 = 1383.85  # мм/(сек*сек)  # максимальное линейное ускорение  разгона штока
t1 := Wn/ε1 = 0.0751999  # s  # минимально возможное время разгона
# От Бормотова
# рад/(сек*сек) | максимальное угловое ускорение  разгона привода
ε1 := (Mn + Mстат1)/Jсумм = 3481.38
a1 := ε1*Kрвп*0.159 = 1383.85  # мм/(сек*сек)  # максимальное линейное ускорение  разгона штока
t1 := Wn/ε1 = 0.0751999  # s  # минимально возможное время разгона
# 1.1.2 Торможение
Mстат2 := Fшток*Kрвп*10^-3/(2*3.14)*ηgear2 = 4.53822  # Nm  # стат. момент на валу двигателя
ε2 := |Mn - Mстат2|/Jсумм = 2244.28  # рад/(сек*сек)  # макс. угловое ускорение  замедления
a2 := ε2*Kрвп*0.159 = 892.101  # мм/(сек*сек)  # максимальное линейное ускорение  замедления штока
t2 := Wn/ε2 = 0.116652  # s  # минимально возможное время торможения
# От Бормотова
Mстат2 := Fшток*Kрвп*10^-3/(2*π)*ηgear2 = 4.53592  # Nm  # стат. момент на валу двигателя
ε2 := (-2*Mn - Mстат2)/Jсумм = -6344.36  # рад/(сек*сек)  # макс. угловое ускорение  замедления
a2 := ε2*Kрвп*0.159 = -2521.89  # мм/(сек*сек)  # максимальное линейное ускорение  замедления штока
t2 := Wn/ε2 = -0.0412649  # s  # минимально возможное время торможения
# 1.2 Двигательный режим (работа на нагрузку, не провелял Бормотов)
# 1.2.1 Разгон
Mстат3 := Fшток*Kрвп*10^-3/(2*3.14)*1/ηgear1 = 19.9045  # Nm  # стат. момент на валу двигателя
ε3 := |Mn - Mстат3|/Jсумм = 149.358  # рад/(сек*сек)  # максимальное угловое ускорение  разгона
a3 := ε3*Kрвп*0.159 = 59.3698  # мм/(сек*сек)  # максимальное линейное ускорение  разгона штока
t3 := Wn/ε3 = 1.75283
# s | минимально возможное время разгона
# 1.2.2 Торможение
Mстат4 := Fшток*Kрвп*10^-3/(2*3.14)*1/ηgear1 = 19.9045  # Nm  # стат. момент на валу двигателя
ε4 := |Mn + Mстат4|/Jсумм = 5576.61  # рад/(сек*cek)  # максимальное угловое ускорение замедления
a4 := ε4*Kрвп*0.159 = 2216.7  # максимальное линейное ускорение  разгона штока
мм/(сек*сек)
t4 := Wn/ε4 = 0.0469459  # s  # минимально возможное время торможения
# 2. РАСЧЕТ ОПТИМАЛЬНОЙ СКОРОСТИ РАВНОМЕРНОГО ДВИЖЕНИЯ ДЛЯ ГЕНЕРАТОРНОГО РЕЖИМА
# 2.1 Оптимизация ускорения разгона и номинальной скорости под условия заказчика. Ускорение замедления не меняем для возможности быстро остановится в случае аварийной ситуации. Добиваемся запаса по времени перекладки в 20% (2,8 сек)
ε11_опт := 54.4  # об / сек^2  # Выбираем оптимальное ускорение в пределах допустимых
ε22_опт := 54.4  # об / сек^2
ε1_опт := ε11_опт*6.283 = 341.795  # рад / сек^2
ε2_опт := ε22_опт*6.283 = 341.795  # рад / сек^2
a1_опт := ε1_опт*Kрвп*0.159 = 135.864  # мм / сек^2
a2_опт := ε2_опт*Kрвп*0.159 = 135.864  # мм / сек^2
# Подбираем скорость равномерного движения в генераторном режиме
n_gen_опт := 1632  # ВВОДИ СЮДА  # об/мин  # подобранная углоая скорость штока ЭМП
W_gen_опт := n_gen_опт*π/30 = 170.903  # рад/сек  # подобранная угловая скорость штока ЭМП
WW_dvig_опт := W_gen_опт/6.283 = 27.2008  # об/сек
v_gen_опт := n_gen_опт*Kрвп/60 = 68  # мм/с  # подобранная линейная скорость штока ЭМП
# Вычисляем новое время разгона
t1_опт := W_gen_опт/ε1_опт = 0.500015  # с  # новое время разгона до v_gen_опт
# Вычисляем новое время торможения
t2_опт := W_gen_опт/ε2_опт = 0.500015  # с  # новое время торможения с v_gen_опт до 0
# Вычисляем пройденные пути
S_разг_опт_gen := a1_опт*t1_опт^2/2 = 16.984  # мм  # новый пройденный путь на участке разгона
S_торм_опт_gen := a2_опт*t2_опт^2/2 = 16.984  # мм  # новый пройденный путь на участке торможения
S_движ_опт_gen := S_rab - (S_разг_опт_gen + S_торм_опт_gen) = 136.032  # мм
# пройденный путь
# на участке
# равном. движения
# Вычисляем новое время равномерного движения
tравн_опт_gen := S_движ_опт_gen/v_gen_опт = 2.00047  # с
# новое время равномерно движения
# со скоростью v_gen_опт
# Вычисляем новое время перекладки в генераторном режиме
Tsumm_опт_gen := t1_опт + t2_опт + tравн_опт_gen = 3.0005  # с
# НОВОЕ ВРЕМЯ ПЕРЕКЛАДКИ
# со скоростью v_gen_опт
# 3. РАСЧЕТ ОПТИМАЛЬНОЙ СКОРОСТИ РАВНОМЕРНОГО ДВИЖЕНИЯ ДЛЯ ДВИГАТЕЛЬНОГО РЕЖИМА
# 3.1 Оптимизация ускорения разгона и номинальной скорости под условия заказчика. Ускорение замедления не меняем для возможности быстро остановится в случае аварийной ситуации. Добиваемся запаса по времени перекладки в 20% (2,8 сек)
ε33_опт := 50  # об / сек^2  # Выбираем оптимальное ускорение в пределах допустимых
ε44_опт := 50  # об / сек^2
ε3_опт := ε33_опт*6.283 = 314.15  # рад / сек^2
ε4_опт := ε44_опт*6.283 = 314.15  # рад / сек^2
a3_опт := ε3_опт*Kрвп*0.159 = 124.875  # мм / сек^2
a4_опт := ε4_опт*Kрвп*0.159 = 124.875  # мм / сек^2
# Подбираем скорость равномерного движения
n_dvig_опт := 1350  # ВВОДИ СЮДА  # об/мин  # подобранная углоая скорость штока ЭМП
W_dvig_опт := n_dvig_опт/9.55 = 141.361  # рад/сек  # подобранная углоая скорость штока ЭМП
WW_dvig_опт := W_dvig_опт/6.283 = 22.499  # об/сек
v_dvig_опт := n_dvig_опт*Kрвп/60  # мм/с
# подобранная
# линейная скорость штока ЭМП
# Вычисляем новое время разгона
t3_опт := W_dvig_опт/ε3_опт = 0.44998  # c  # новое время разгона до v_dvig_опт
# Вычисляем новое время торможения
c
t4_опт := W_dvig_опт/ε4_опт = 0.44998  # новое время торможения с v_dvig_опт до 0
# Вычисляем пройденные пути
S_разг_опт_dvig := a3_опт*t3_опт^2/2 = 12.6424  # мм  # новый пройденный путь на участке разгона
S_торм_опт_dvig := a4_опт*t4_опт^2/2 = 12.6424  # мм  # новый пройденный путь на участке торможения
S_движ_опт_dvig := S_rab - (S_разг_опт_dvig + S_торм_опт_dvig) = 144.715  # мм
# пройденный
# путь на участке
# равном. движения
# Вычисляем новое время равномерного движения
tравн_опт_dvig := S_движ_опт_dvig/v_dvig_опт = 2.57271  # с
# новое время равномерно движения
# со скоростью v_dvig_опт
# Вычисляем новое время перекладки в генераторном режиме
Tsumm_опт_dvig := t3_опт + t4_опт + tравн_опт_dvig = 3.47267  # с
# НОВОЕ ВРЕМЯ ПЕРЕКЛАДКИ
# со скоростью v_dvig_опт
# 4. Расчет электрической мощности торможения, вырабатываемой двигателем при остановке при движения по нагрузке (ген. режим)
# Здесь мы рассчитываем приведенные моменты инерции на валу двигателя и переводим
# механическую энергию торможения в электрическую
Mстат := Fшток*Kрвп*10^-3/(2*π)*ηgear2 = 4.53592  # Н*м  # стат. момент на валу двигателя
Mдин := Jсумм*n_gen_опт/t2_опт*1/9.55 = 2.50688  # Н*м  # динамический момент на валу двигателя
M := Mстат + Mдин = 7.0428  # Н*м  # Суммарный момент на валу двигателя
Pbrake := n_gen_опт/9.55*M = 1203.54  # Вт  # механическая мощность торможения
P := Pbrake*ηдвиг = 1059.12  # Вт  # электрическая мощность торможения
# От БОРМОТОВА
# Эл. мощность на участке разгона - генераторный режим
Mстат := Fшток*Kрвп*10^-3/(2*π)*ηgear2 = 4.53592  # Н*м  # стат. момент на валу двигателя
Mдин_разг := Jсумм*W_gen_опт/t1_опт = 2.50707  # Н*м  # динамический момент на валу двигателя
# Эл. мощность на прямолинейном участке - генераторный режим
Mразг := Mдин_разг - Mстат = -2.02885  # Н*м  # Суммарный момент на валу двигателя
Mстат := Fшток*Kрвп*10^-3/(2*π)*ηgear2 = 4.53592  # Н*м  # стат. момент на валу двигателя
Pмех_макс_разг := W_gen_опт*Mразг = -346.735  # Вт  # максимальная механическая мощность
Mдин_прям := 0  # Н*м  # динамический момент на валу двигателя
Pмех_средн_разг := W_gen_опт/2*Mразг = -173.368  # Вт  # Средняя мощность
# Эл. мощность на участке торможения - генераторный режим
Mпрям := Mдин_прям - Mстат = -4.53592  # Н*м  # Суммарный момент на валу двигателя
Iразг := Mразг/Kt_mot = -0.922204  # А  # Ток на участке разгона
Mстат := Fшток*Kрвп*10^-3/(2*π)*ηgear2 = 4.53592  # Н*м  # стат. момент на валу двигателя
Pмех_макс_прям := W_gen_опт*Mпрям = -775.2  # Вт  # максимальная механическая мощность
Pohm_разг := 1.5*Rphase*Iразг*Iразг = 0.561303  # Вт  # Мощность, которая выделится на обмотке мотора
Mдин_торм := Jсумм*W_gen_опт/t2_опт = 2.50707  # Н*м  # динамический момент на валу двигателя
Pмех_средн_прям := W_gen_опт*Mпрям = -775.2  # Вт  # Средняя мощность
Pshunt_макс_разг := Pмех_макс_разг - Pohm_разг = -347.297  # Ом  # Пиковая мощность шунта
Iпрям := Mпрям/Kt_mot = -2.06178  # А  # Ток на прямолин участке
Mторм := -Mдин_торм - Mстат = -7.04298  # Н*м  # Суммарный момент на валу двигателя
Pshunt_средн_разг := Pмех_средн_разг - Pohm_разг = -173.929  # Ом  # Средняя мощность шунта
# Мощность, которая выделится на обмотке мотора
Pohm_прям := 1.5*Rphase*Iпрям*Iпрям = 2.80562  # Вт
Pмех_макс_торм := W_gen_опт*Mторм = -1203.66  # Вт  # максимальная механическая мощность
Pshunt_макс_прям := Pмех_макс_прям - Pohm_прям = -778.006  # Вт  # Пиковая мощность шунта
Pмех_средн_торм := W_gen_опт/2*Mторм = -601.832  # Вт  # Средняя мощность
Pshunt_средн_прям := Pмех_средн_прям - Pohm_прям = -778.006  # Вт  # Средняя мощность шунта
Iторм := Mторм/Kt_mot = -3.20136  # А  # Ток на участке разгона
Pohm_торм := 1.5*Rphase*Iторм*Iторм = 6.76413  # Вт  # Мощность, которая выделится на обмотке мотора
Pshunt_макс_торм := Pмех_макс_торм - Pohm_торм = -1210.43  # Вт  # Пиковая мощность шунта
Pshunt_средн_торм := Pмех_средн_торм - Pohm_торм = -608.596  # Вт  # Средняя мощность шунта
Вт
# Это усредненная мощность шунта за время, когда привод перемещается от одного конца хода
# до другого по заданному циклу и находится все время в генераторном режиме
Pshunt_AVG_gen := t1_опт*Pshunt_средн_разг/Tsumm_опт_gen + tравн_опт_gen*Pshunt_средн_прям/Tsumm_опт_gen + t2_опт*Pshunt_средн_торм/Tsumm_опт_gen = -649.109
# Это усредненная мощность шунта за время, когда привод перемещается от одного конца хода
# до другого по заданному циклу и обратно.
Pshunt_AVG := Pshunt_AVG_gen/2 = -324.555  # Вт
# 5. Расчет тормозного резистора
Rbr := U^2/P = 604.276  # Ом  # максимально допустимое значение тормозного резистора
ED := t2_опт/T_move*100 = 16.6672  # продолжительность включения (для поиска Fk по графику)
Fk := 7  # коэфф, зависящий от ED. Выбираем из графика
Prb := P/Fk = 151.303  # Вт  # мощность резистора. Используется, если  резистор будет работать только в течение времени t2_опт (время торможения в ген. режиме)
Pr_peak := U^2/Rbr = 1059.12
# мгновенная мощность на резисторе. Эта мощность будет рассеиваться все время пока резистор будет подключен к ЗПТ. Эта мощность будет рассеиваться в виде тепла все время движения привода в генераторном режиме
# (Tgen)
Tgen := tравн_опт_gen + t2_опт = 2.50049  # с  # время в течение которого двигатель работает в  генераторном режиме
# От Бормотова
Rbr := U^2/Pshunt_макс_торм = -528.738  # Ом  # максимально допустимое значение тормозного резистора
# 6. Перенапряжение в звене постоянного тока при отсутствии тормозного резистора
# 6.1  Расчет энергии, требуемой на зяряд емкости ЗПТ
# Рассмотрим случай питания БУП номинальным напряженим
Uin := 400  # VAC  # питание БУП
Udc_nom := sqrt(2)*Uin = 565.685  # V  # Выпрямленное напряжение ЗПТ
U = 800  # V  # Макс напряжение в ЗПТ
# Расчитаем энергию, необходимую для заряда емкости ЗПТ за время генераторного режима до напряжения U
Tsumm_опт_gen = 3.0005  # время перемещения = времени работы в ген.режиме
Ec := Cзпт*750^2/2 - Cзпт*560^2/2 = 246.411  # J  # Энергия для заряда банок
# 6.2  Расчет энергии в генераторном режиме
# 6.2.1 Разгон
Mдин_разг := Jсумм*(0 - n_gen_опт)/t1_опт*1/9.55 = -2.50688  # Н*м  # динамический момент на валу двигателя при разгоне
M_разг := Mстат + Mдин_разг = 2.02903  # Н*м  # Суммарный момент на валу двигателя при разгоне
Pbrake_разг := n_gen_опт/9.55*M_разг = 346.742  # Вт  # механическая мощность при разгоне
Pразг := Pbrake_разг*ηдвиг = 305.133  # Вт  # электрическая мощность торможения
Eразг := Pразг*t1_опт = 152.571  # J  # энергия торможения
Uразг := sqrt((Eразг + Cзпт*Udc_nom^2/2)*2/Cзпт) = 688.558  # напряжение до которого зарядятся банки во время разгона без резистора
# 6.2.2  Равномерное движение
Mстат_равн := Fшток*Kрвп*10^-3/(2*π)*ηgear2 = 4.53592  # Н*м  # стат. момент на валу двигателя
# динамический момент
# на валу двигателя
# при разгоне
Mдин_равн := Jсумм*(n_gen_опт - n_gen_опт)/t2_опт*1/9.55 = 0  # Н*м
M_разг_равн := Mстат_равн + Mдин_равн = 4.53592  # Н*м
# суммарный момент
# на валу двигателя
Pbrake_равн := n_gen_опт/9.55*M_разг_равн = 775.143  # Вт  # механическая мощность при разгоне
Pразг_равн := Pbrake_равн*ηдвиг = 682.126  # Вт  # электрическая мощность торможения
Eравн := Pразг_равн*tравн_опт_gen = 1364.57  # J  # энергия торможения
Uравн := sqrt((Eравн + Cзпт*Udc_nom^2/2)*2/Cзпт) = 1303.21  # напряжение до которого зарядятся банки во время равн. движения без резистора
# 6.2.3  Торможение
Mстат_торм := Fшток*Kрвп*10^-3/(2*π)*ηgear2 = 4.53592  # Н*м
# стат. момент на валу
# двигателя
Mдин_торм := Jсумм*(n_gen_опт - 0)/t2_опт*1/9.55 = 2.50688  # Н*м  # динамический момент на валу двигателя при разгоне
M_торм_равн := Mстат_торм + Mдин_торм = 7.0428
tравн_опт_gen = 2.00047  # с  # время равномерного движения
Pbrake_торм := n_gen_опт/9.55*M_торм_равн = 1203.54  # Вт
# механическая мощность
# при разгоне
Pторм_равн := Pbrake_торм*ηдвиг = 1059.12  # Вт  # электрическая мощность торможения
Eторм := Pторм_равн*t2_опт = 529.575  # J  # энергия торможения
# напряжение до которого зарядятся банки во время торможения без резистора
Uторм := sqrt((Eторм + Cзпт*Udc_nom^2/2)*2/Cзпт) = 924.621
Esumm := Eразг + Eравн + Eторм = 2046.72  # J  # суммарная энергия генератора во всех режимах
Uмакс := sqrt((Esumm + Cзпт*Udc_nom^2/2)*2/Cзпт) = 1545.12  # напряжение до которого зарядятся банки в генераторном режиме без резистора
